<?xml version="1.0"?>
<fdm_config name="FW" version="2.0" release="ALPHA">
 <fileheader>
  <author> JSBSim Advanced Generator </author>
  <description> FW ArduPilot SITL Model </description>
 </fileheader>

 <metrics>
  <wingarea  unit="FT2"> 5.8125 </wingarea>
  <wingspan  unit="FT">  5.9055  </wingspan>
  <chord     unit="FT">  0.9843 </chord>
  <htailarea unit="FT2"> 1.1625 </htailarea>
  <htailarm  unit="FT">  2.4606 </htailarm>
  <vtailarea unit="FT2"> 0.5813 </vtailarea>
  <vtailarm  unit="FT">  2.4606 </vtailarm>
  <location name="AERORP" unit="IN">
   <x> 22.6378 </x> <!-- STRICTLY BEHIND CG -->
   <y> 0 </y>
   <z> 0 </z>
  </location>
  <location name="EYEPOINT" unit="IN">
   <x> 10.3347 </x> <y> 0 </y> <z> 5 </z>
  </location>
  <location name="VRP" unit="IN">
   <x> 0 </x> <y> 0 </y> <z> 0 </z>
  </location>
 </metrics>

 <mass_balance>
  <ixx unit="SLUG*FT2"> 0.7966 </ixx>
  <iyy unit="SLUG*FT2"> 0.5532 </iyy>
  <izz unit="SLUG*FT2"> 1.3497 </izz>
  <emptywt unit="LBS"> 8.8185 </emptywt>
  <location name="CG" unit="IN">
   <x> 20.6693 </x>
   <y> 0 </y>
   <z> 0 </z>
  </location>
 </mass_balance>

 <ground_reactions>
  <!-- Belly Landing Setup (No Wheels) -->
  <contact type="BOGEY" name="NOSE_SKID">
   <location unit="IN"> <x> 4.1339 </x> <y>0</y> <z>-4</z> </location>
   <static_friction>  0.80 </static_friction>
   <dynamic_friction> 0.60 </dynamic_friction>
   <rolling_friction> 0.60 </rolling_friction>
   <spring_coeff unit="LBS/FT"> 132.3 </spring_coeff>
   <damping_coeff unit="LBS/FT/SEC"> 52.9 </damping_coeff>
   <max_steer unit="DEG"> 0.0 </max_steer>
   <brake_group> NONE </brake_group>
  </contact>
  <contact type="BOGEY" name="BELLY_SKID">
   <location unit="IN"> <x> 26.5748 </x> <y>0</y> <z>-5</z> </location>
   <static_friction>  0.80 </static_friction>
   <dynamic_friction> 0.60 </dynamic_friction>
   <rolling_friction> 0.60 </rolling_friction>
   <spring_coeff unit="LBS/FT"> 132.3 </spring_coeff>
   <damping_coeff unit="LBS/FT/SEC"> 52.9 </damping_coeff>
  </contact>
  <contact type="BOGEY" name="LEFT_WINGTIP">
   <location unit="IN"> <x> 20.6693 </x> <y>-35.4331</y> <z>0</z> </location>
   <static_friction>  0.80 </static_friction>
   <dynamic_friction> 0.60 </dynamic_friction>
   <rolling_friction> 0.60 </rolling_friction>
   <spring_coeff unit="LBS/FT"> 44.1 </spring_coeff>
   <damping_coeff unit="LBS/FT/SEC"> 17.6 </damping_coeff>
  </contact>
  <contact type="BOGEY" name="RIGHT_WINGTIP">
   <location unit="IN"> <x> 20.6693 </x> <y>35.4331</y> <z>0</z> </location>
   <static_friction>  0.80 </static_friction>
   <dynamic_friction> 0.60 </dynamic_friction>
   <rolling_friction> 0.60 </rolling_friction>
   <spring_coeff unit="LBS/FT"> 44.1 </spring_coeff>
   <damping_coeff unit="LBS/FT/SEC"> 17.6 </damping_coeff>
  </contact>
 </ground_reactions>


 <propulsion>
  <engine file="electric_motor">
   <location unit="IN"> <x> 12.7953 </x> <y>0</y> <z>0</z> </location>
   <orient unit="DEG"> <roll>0</roll> <pitch>0</pitch> <yaw>0</yaw> </orient>
   <thruster file="prop">
    <sense> 1 </sense>
    <location unit="IN"> <x> 12.7953 </x> <y>0</y> <z>0</z> </location>
    <orient unit="DEG"> <roll>0</roll> <pitch>0</pitch> <yaw>0</yaw> </orient>
   </thruster>
  </engine>
 </propulsion>

 <flight_control name="FCS">
  <channel name="Roll">
   <summer name="Roll Trim Sum">
    <input>fcs/aileron-cmd-norm</input>
    <clipto> <min>-1</min> <max>1</max> </clipto>
   </summer>
   <aerosurface_scale name="Left Aileron">
    <input>fcs/roll-trim-sum</input>
    <range> <min>-0.35</min> <max>0.35</max> </range>
    <output>fcs/left-aileron-pos-rad</output>
   </aerosurface_scale>
  </channel>
  <channel name="Pitch">
   <summer name="Pitch Trim Sum">
    <input>fcs/elevator-cmd-norm</input>
    <clipto> <min>-1</min> <max>1</max> </clipto>
   </summer>
   <aerosurface_scale name="Elevator">
    <input>fcs/pitch-trim-sum</input>
    <range> <min>-0.35</min> <max>0.35</max> </range>
    <output>fcs/elevator-pos-rad</output>
   </aerosurface_scale>
  </channel>
  <channel name="Yaw">
   <summer name="Rudder Sum">
    <input>fcs/rudder-cmd-norm</input>
    <clipto> <min>-1</min> <max>1</max> </clipto>
   </summer>
   <aerosurface_scale name="Rudder">
    <input>fcs/rudder-sum</input>
    <range> <min>-0.35</min> <max>0.35</max> </range>
    <output>fcs/rudder-pos-rad</output>
   </aerosurface_scale>
  </channel>
  <channel name="Throttle">
   <pure_gain name="Throttle">
    <input>fcs/throttle-cmd-norm</input>
    <gain>1.0</gain>
    <output>fcs/throttle-pos-norm</output>
   </pure_gain>
   <!-- Map QuadPlane VTOL Channels from ArduPilot to Engines 1-4 -->
   <pure_gain name="VTOL_FR">
    <input>fcs/throttle-cmd-norm[1]</input>
    <gain>1.0</gain>
    <output>fcs/throttle-pos-norm[1]</output>
   </pure_gain>
   <pure_gain name="VTOL_BL">
    <input>fcs/throttle-cmd-norm[2]</input>
    <gain>1.0</gain>
    <output>fcs/throttle-pos-norm[2]</output>
   </pure_gain>
   <pure_gain name="VTOL_FL">
    <input>fcs/throttle-cmd-norm[3]</input>
    <gain>1.0</gain>
    <output>fcs/throttle-pos-norm[3]</output>
   </pure_gain>
   <pure_gain name="VTOL_BR">
    <input>fcs/throttle-cmd-norm[4]</input>
    <gain>1.0</gain>
    <output>fcs/throttle-pos-norm[4]</output>
   </pure_gain>
  </channel>
 </flight_control>

 <aerodynamics>
  <axis name="LIFT">
   <function name="aero/coefficient/CLalpha">
    <product>
     <property>aero/qbar-psf</property>
     <property>metrics/Sw-sqft</property>
     <property>aero/alpha-rad</property>
     <value>5.0</value>
    </product>
   </function>
   <function name="aero/coefficient/CL0">
    <product>
     <property>aero/qbar-psf</property>
     <property>metrics/Sw-sqft</property>
     <value>0.25</value>
    </product>
   </function>
   <function name="aero/coefficient/CLq">
    <product>
     <property>aero/qbar-psf</property>
     <property>metrics/Sw-sqft</property>
     <property>velocities/q-aero-rad_sec</property>
     <property>aero/ci2vel</property>
     <value>5.0</value>
    </product>
   </function>
  </axis>
  <axis name="DRAG">
   <function name="aero/coefficient/CD0">
    <product>
     <property>aero/qbar-psf</property>
     <property>metrics/Sw-sqft</property>
     <value>0.028</value>
    </product>
   </function>
   <function name="aero/coefficient/CDi">
    <product>
     <property>aero/qbar-psf</property>
     <property>metrics/Sw-sqft</property>
     <property>aero/cl-squared</property>
     <value>0.04</value>
    </product>
   </function>
  </axis>
  <axis name="PITCH">
   <function name="aero/coefficient/Cm0">
    <product>
     <property>aero/qbar-psf</property>
     <property>metrics/Sw-sqft</property>
     <property>metrics/cbarw-ft</property>
     <value>-0.05</value>
    </product>
   </function>
   <function name="aero/coefficient/Cmalpha">
    <product>
     <property>aero/qbar-psf</property>
     <property>metrics/Sw-sqft</property>
     <property>metrics/cbarw-ft</property>
     <property>aero/alpha-rad</property>
     <value>-0.5</value>
    </product>
   </function>
   <function name="aero/coefficient/Cmde">
    <product>
     <property>aero/qbar-psf</property>
     <property>metrics/Sw-sqft</property>
     <property>metrics/cbarw-ft</property>
     <property>fcs/elevator-pos-rad</property>
     <value>-0.5</value>
    </product>
   </function>
   <function name="aero/coefficient/Cmq">
    <product>
     <property>aero/qbar-psf</property>
     <property>metrics/Sw-sqft</property>
     <property>metrics/cbarw-ft</property>
     <property>aero/ci2vel</property>
     <property>velocities/q-aero-rad_sec</property>
     <value>-12.0</value>
    </product>
   </function>
  </axis>
  <axis name="ROLL">
   <function name="aero/coefficient/Clb">
    <product>
     <property>aero/qbar-psf</property>
     <property>metrics/Sw-sqft</property>
     <property>metrics/bw-ft</property>
     <property>aero/beta-rad</property>
     <value>-0.1</value>
    </product>
   </function>
   <function name="aero/coefficient/Clp">
    <product>
     <property>aero/qbar-psf</property>
     <property>metrics/Sw-sqft</property>
     <property>metrics/bw-ft</property>
     <property>aero/bi2vel</property>
     <property>velocities/p-aero-rad_sec</property>
     <value>-0.4</value>
    </product>
   </function>
   <function name="aero/coefficient/Clr">
    <product>
     <property>aero/qbar-psf</property>
     <property>metrics/Sw-sqft</property>
     <property>metrics/bw-ft</property>
     <property>aero/bi2vel</property>
     <property>velocities/r-aero-rad_sec</property>
     <value>0.15</value>
    </product>
   </function>
   <function name="aero/coefficient/Clda">
    <product>
     <property>aero/qbar-psf</property>
     <property>metrics/Sw-sqft</property>
     <property>metrics/bw-ft</property>
     <property>fcs/left-aileron-pos-rad</property>
     <value>0.13</value>
    </product>
   </function>
   <function name="aero/coefficient/Cldr">
    <product>
     <property>aero/qbar-psf</property>
     <property>metrics/Sw-sqft</property>
     <property>metrics/bw-ft</property>
     <property>fcs/rudder-pos-rad</property>
     <value>0.02</value>
    </product>
   </function>
  </axis>
  <axis name="YAW">
   <function name="aero/coefficient/Cnb">
    <product>
     <property>aero/qbar-psf</property>
     <property>metrics/Sw-sqft</property>
     <property>metrics/bw-ft</property>
     <property>aero/beta-rad</property>
     <value>0.12</value>
    </product>
   </function>
   <function name="aero/coefficient/Cnr">
    <product>
     <property>aero/qbar-psf</property>
     <property>metrics/Sw-sqft</property>
     <property>metrics/bw-ft</property>
     <property>aero/bi2vel</property>
     <property>velocities/r-aero-rad_sec</property>
     <value>-0.15</value>
    </product>
   </function>
   <function name="aero/coefficient/Cndr">
    <product>
     <property>aero/qbar-psf</property>
     <property>metrics/Sw-sqft</property>
     <property>metrics/bw-ft</property>
     <property>fcs/rudder-pos-rad</property>
     <value>-0.05</value>
    </product>
   </function>
   <function name="aero/coefficient/Cnp">
    <product>
     <property>aero/qbar-psf</property>
     <property>metrics/Sw-sqft</property>
     <property>metrics/bw-ft</property>
     <property>aero/bi2vel</property>
     <property>velocities/p-aero-rad_sec</property>
     <value>-0.05</value>
    </product>
   </function>
   <function name="aero/coefficient/Cnda">
    <product>
     <property>aero/qbar-psf</property>
     <property>metrics/Sw-sqft</property>
     <property>metrics/bw-ft</property>
     <property>fcs/left-aileron-pos-rad</property>
     <value>-0.02</value>
    </product>
   </function>
  </axis>
 </aerodynamics>

 <!-- Output telemetry directly from JSBSim to server.py -->
 <output name="127.0.0.1" type="SOCKET" port="8999" protocol="UDP" rate="10">
  <!-- Aerodynamics -->
  <property> forces/fwz-aero-lbs </property> <!-- Lift (Negative Z) -->
  <property> forces/fwx-aero-lbs </property> <!-- Drag (Negative X) -->
  <property> aero/alpha-deg </property>
  <property> aero/beta-deg </property>
  <property> velocities/ve-kts </property>

  <!-- Propulsion -->
  <property> propulsion/engine[0]/thrust-lbs </property>
  <property> propulsion/engine[0]/propeller-rpm </property>
  <property> propulsion/engine[0]/power-hp </property>

  <!-- Atmosphere & Environment -->
  <property> atmosphere/wind-mag-fps </property>
  <property> atmosphere/wind-down-fps </property>
  <property> atmosphere/rho-slugs_ft3 </property>
  <property> accelerations/n-pilot-z-norm </property>
 </output>

</fdm_config>
